// GridLAB-D tariff design model file

//GridLAB-D modules
module revenue;

//py modules
module tariff_design;

//Define classes here (inputs and outputs)

object tariff {
	name "tariff";
}

object billing {
	name "test_bill";
	meter "test_meter";
	tariff "tariff";
	billing_hrs "0.0";
	total_charges "0.0";
	usage "0.0";
	total_usage "0.0";
	total_power "0.0";
}
